# Расчет площади круга заданного радиуса
R := 5, 5.5 .. 10
S(R) := π*R^2
R = [5; 5.5; 6; 6.5; 7; 7.5; 8; 8.5; 9; 9.5; 10]
S(R) = [78.5398; 95.0332; 113.097; 132.732; 153.938; 176.715; 201.062; 226.98; 254.469; 283.529; 314.159]
φ := 0, 0.1*π .. 3.5*π
x(φ) := sin(φ)
y(φ) := 2^(-0.6*φ)
# Построение графиков двух функций
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φ := 1
Given
sin(φ) == 2
root := Find(φ)  # error: This variable is undefined.
x := 2
Given
x^2 + 10 == 2^x
a := Find(x)  # error: This variable is undefined.
