# Задание 1.Построить в пространстве каркасную треугольную пирамиду, заданную координатами вершин:
# Вариант 24
ORIGIN := 1
x1 := 9
y1 := 14
z1 := 2
x2 := 3
y2 := 18
z2 := 17
x3 := 2
y3 := 7
z3 := 5
x4 := 4
y4 := 8
z4 := 1
A1 := [x1; y1; z1]
A2 := [x2; y2; z2]
A3 := [x3; y3; z3]
A4 := [x4; y4; z4]
x := [A1[1, 1], A2[1, 1], A3[1, 1], A1[1, 1], A4[1, 1], A3[1, 1], A2[1, 1], A4[1, 1]]
y := [A1[2, 1], A2[2, 1], A3[2, 1], A1[2, 1], A4[2, 1], A3[2, 1], A2[2, 1], A4[2, 1]]
z := [A1[3, 1], A2[3, 1], A3[3, 1], A1[3, 1], A4[3, 1], A3[3, 1], A2[3, 1], A4[3, 1]]
L := transpose([x, y, z])  # вектор с координатами контура для построения пирамиды
a1(x, y) := [A1[1]; A1[2]; A1[3]]
a2(x, y) := [A2[1]; A2[2]; A2[3]]
a3(x, y) := [A3[1]; A3[2]; A3[3]]
a4(x, y) := [A4[1]; A4[2]; A4[3]]
# [component: inputs L, a1, a2, a3, a4]
# Задание 2.Выбрать в построенной каркасной пирамиде два противоположных ребра. Выделить их цветом. Построить для них взаимный перпендикуляр.
A1 = [9; 14; 2]
A2 = [3; 18; 17]
A3 = [2; 7; 5]
A4 = [4; 8; 1]
# Построим взаимный перпендикуляр между противоположными ребрами A1A2 и A3A4
n1 := (A2 - A1)/|A2 - A1|
f1(t) := A1 + t*n1
Line1 := CreateSpace(f1, 0, 17, 50)
n2 := (A4 - A3)/|A4 - A3|
f2(t) := A3 + t*n2
Line2 := CreateSpace(f2, 0, 5, 50)
t1 := 0
t2 := 0
Given
(f1(t1) - f2(t2))*n1 == 0
(f1(t1) - f2(t2))*n2 == 0
S := Find(t1, t2)
S = [-14.0206; 19.7016]
t1 := S[1]
t2 := S[2]
P1 := f1(t1)
P2 := f2(t2)
G(t) := P1 + t*(P2 - P1)
Perp := CreateSpace(G, -4, 2, 6)
# [component: inputs L, Line1, Line2, Perp]
# Задание 3.Для одной из вершин построенной каркасной пирамиды построить отрезок прямой, проходящей через данную вершину и параллельный одному из рёбер пирамиды. Построить взаимный перпендикуляр для полученных параллельных прямых, проходящий через данную вершину.
# Построим через точку A1 прямую A1S, параллельную прямой A2A3
# Найдем для этого положение некоторой точки S, через которую будет проходить данная прямая
# Составим вектор A1S:
A1S(xs, ys, zs) := [xs - A1[1]; ys - A1[2]; zs - A1[3]]
# Составим вектор A2A3:
A2A3 := [A3[1] - A2[1]; A3[2] - A2[2]; A3[3] - A2[3]]
# Вектор A2A3 будет коллинеарен вектору A1S, тогда отношения их координат должны быть равны, длина A1S пусть будет равна 10
Given
xs := 1
ys := 1
zs := 1
(xs - A1[1])/A2A3[1] == (ys - A1[2])/A2A3[2] == (zs - A1[3])/A2A3[3]
sqrt((xs - A1[1])^2 + (ys - A1[2])^2 + (zs - A1[3])^2) == 10
S := Find(xs, ys, zs) = [8.38686; 7.25547; -5.35767]
A1S := A1S(S[1], S[2], S[3]) = [-0.613139; -6.74453; -7.35767]
# Затем построим взаимный перпендикуляр к прямым A1S и A2A3, который будет проходить через точку A1 (и основание его будет в точке H на прямой A2A3)
n1 := (A2 - A3)/|A2 - A3|
f1(t) := A3 + t*n1
A2A3 := CreateSpace(f1, 0, 16, 50)
n2 := (S - A1)/|S - A1|
f2(t) := A1 + t*n2
A1S := CreateSpace(f2, 0, 16, 50)
t1 := 0
t2 := 0
Given
(f1(t1) - f2(t2))*n1 == 0
(f1(t1) - f2(t2))*n2 == 0
D := Find(t1, t2)
D = [2.94307; 0]
t1 := D[1]
t2 := D[2]
P1 := f1(t1)
P2 := f2(t2)
G(t) := P2 + t*(P2 - P1)
Perp := CreateSpace(G, -4, 2, 6)
# [component: inputs L, A2A3, A1S, Perp]
# Задание 4.Для одной из граней построенной каркасной пирамиды построить плоскость, которой эта грань принадлежит, составить уравнение этой плоскости.
# Составим уравнение плоскости A1A2A3, проходящей через точки A1, A2,A3:
A1 = [9; 14; 2]
A2 = [3; 18; 17]
A3 = [2; 7; 5]
# Составляем определитель для плоскости A1A2A3 и приравниваем к нулю:
A := A2[1] - A1[1]
B := A2[2] - A1[2]
C := A2[3] - A1[3]
det(x, y, z) := det([
    x - A1[1], y - A1[2], z - A1[3];
    A2[1] - A1[1], A2[2] - A1[2], A2[3] - A1[3];
    A3[1] - A1[1], A3[2] - A1[2], A3[3] - A1[3]
]) → 117*x - 87*y + 70*z + 25
a1(x, y) := [A1[1]; A1[2]; A1[3]]
a2(x, y) := [A2[1]; A2[2]; A2[3]]
117*x - 87*y + 70*z + 25 == 0  # solve
z(x, y) := -117/70*x + 87/70*y - 5/14
solve
Pline(x, y) := [x; y; z(x, y)]
P := CreateMesh(Pline, A1[1], A2[1] - 1, A3[2], A2[2], 10, 10)
# [component: inputs L, P]
# Задание 5.Построить плоскость, проходящую через одну из вершин пирамиды, для которой примыкающее к этой точке ребро является нормалью.
A1 = [9; 14; 2]
A2 = [3; 18; 17]
n1 := (A2 - A1)/|A2 - A1|
f1(t) := A1 + t*n1
Plane(x, y, z) := A*(x - A1[1]) + B*(y - A1[2]) + C*(z - A1[3])
-6*(x - 9) + 4*(y - 14) + 15*(z - 2) == 0
z(x, y) := 2/5*x - 4/15*y + 32/15
A1A2 := CreateSpace(f1, 0, 17, 50)
Pline(x, y) := [x; y; z(x, y)]
A2A3 := CreateSpace(f2, 0, 16, 50)
A1A2line := CreateSpace(f1, 0, 16, 20)
# PA1A2 - плоскость, проходящая через точку A1 и перпендикулярная вектору A1A2
PA1A2 := CreateMesh(Pline, A1[1], A1[2], A1[3], 20, 7, 6)
# [component: inputs L, PA1A2, A1A2line, a1, a2]
# Задание 6.Построить плоскость по двум смежным ребрам пирамиды как направляющим векторам.
# Возьмем смежные ребра A1A2 и A2A3(из прошлых задач) и их общую точку A2
v := (A2 - A1)/|A2 - A1|
f1(t) := A1 + t*n1
A1A2 := CreateSpace(f1, 0, 16.5, 50)
w := (A3 - A2)/|A3 - A2|
f2(t) := A2 + t*n2
A2A3 := CreateSpace(f2, 0, 16, 50)
v = [-0.360505; 0.240337; 0.901263]  # первый направляющий вектор плоскости
w = [-0.0613139; -0.674453; -0.735767]  # второй направляющий вектор плоскости
A2 = [3; 18; 17]  # общая точка для смежных ребер
G(t, τ, k1) := A2[k1] + v[k1]*t + w[k1]*τ  # общий вид уравнения плоскости, заданной двумя направляющими векторами и точкой
Pline(t, τ) := [G(t, τ, 1); G(t, τ, 2); G(t, τ, 3)]
Plane := CreateMesh(Pline, -16, 5, 0, 16, 10, 10)
# [component: inputs L, Plane, A1A2, A2A3]
# Задание 7.Построить плоскость по коэффициентам канонического уравнения
A := 17
B := 18
C := 18
D := 3
# Зададим функцию z(x,y) по заданным коэффициентам и построим плоскость, использовав каноническое уравнение плоскости:
A*x + B*y + C*z + D == 0  # solve
z(x, y) := -A/C*x - B/C*y - D/C
Pline(x, y) := [x; y; z(x, y)]
P := CreateMesh(Pline, 0, 6, 0, 6, 10, 6)
# [component: inputs P]
# Задание 8.Построить плоскость по коэффициентам уравнения в отрезках
hx := 2
hy := 7
hz := 5
# Общий вид уравнения плоскости в отрезках:
x/hx + y/hy + z/hz - 1 == 0  # solve
# Зададим функцию z(x,y) по заданным коэффициентам
z(x, y) := -hz/hx*x - hz/hy*y + hz
Pline(x, y) := [x; y; z(x, y)]
P := CreateMesh(Pline, 0, 6, 0, 6, 10, 6)
# [component: inputs P]
