# Задание 1.Построить в декартовой системе координат треугольник ABC, прямую NM и точку P разными цветами
# Вариант 24
ORIGIN := 1
xa := 13
ya := 7
za := 10
xb := 12
yb := 2
zb := 3
xc := 9
yc := 3
zc := 8
xm := 14
ym := 0
zm := 7
xn := 17
yn := 17
zn := 13
xp := 15
yp := 17
zp := 7
A(x, y) := [xa; ya; za]
B(x, y) := [xb; yb; zb]
C(x, y) := [xc; yc; zc]
M(x, y) := [xm; ym; zm]
N(x, y) := [xn; yn; zn]
P(x, y) := [xp; yp; zp]
xt := [xa, xb, xc, xa]
yt := [ya, yb, yc, ya]
zt := [za, zb, zc, za]
Triangle := [xt; yt; zt]
MN := [xn - xm; yn - ym; zn - zm]
MN = [3; 17; 6]
xs := [xm, xn]
ys := [ym, yn]
zs := [zm, zn]
Straight := [xs; ys; zs]
# [component: inputs Triangle, Straight, P, A, B, C, M, N]
# Задание 2. Построить перпендикуляр к заданной прямой MN из заданной точки P и вычислить его длину
Given
xh := 1
yh := 1
zh := 1
(xh - xp)*MN[1] + (yh - yp)*MN[2] + (zh - zp)*MN[3] == 0
(xh - xn)/(xm - xn) == (yh - yn)/(ym - yn) == (zh - zn)/(zm - zn)
H := Find(xh, yh, zh) = [16.6228; 14.8623; 12.2455]  # основание перпедикуляра
# Найдем длину перпендикуляра PH:
xh := H[1]
yh := H[2]
zh := H[3]
sqrt((xh - xp)^2 + (yh - yp)^2 + (zh - zp)^2) = 5.89225
P := [xp; yp; zp]
M := [xm; ym; zm]
PH := [xh - xp; yh - yp; zh - zp]
f(t) := P + PH*t
PHLine := CreateSpace(f, 0, 10, 10)
f1(t) := M + MN*t
MN = [3; 17; 6]
H(x, y) := [H[1]; H[2]; H[3]]
MNLine := CreateSpace(f1, 0, 5, 10)
# [component: inputs MNLine, PHLine, H]
# Задание 3.Построить плоскость, которой принадлежит треугольник ABC
det(x, y, z) := det([x - xa, y - ya, z - za; xb - xa, yb - ya, zb - za; xc - xa, yc - ya, zc - za]) → 26*y - 18*x - 16*z + 212
z(x, y) := -18/16*x + 26/16*y + 212/16
Pline(x, y) := [x; y; z(x, y)]
Pline1 := CreateMesh(Pline, xa, xb - 1, yc, yb, 10, 10)
# [component: inputs Triangle, Pline1]
# Задание 4.  Построить точку пересечения плоскости ABC и прямой NM
# Уравнение плоскости ABC:
det(x, y, z) → 26*y - 18*x - 16*function + 212
# Составим уравнение прямой MN:
(x - xm)/(xn - xm) == (y - ym)/(yn - ym) == (z - zm)/(zn - zm)
Given
xk := 1
yk := 1
zk := 1  # Плоскость ABC:
z(x, y) := -18/16*x + 26/16*y + 212/16
(xk - xm)/(xn - xm) == (yk - ym)/(yn - ym) == (zk - zm)/(zn - zm)
MN = [3; 17; 6]
M := [xm; ym; zm]
-18*xk + 26*yk - 16*zk + 212 == 0
Pline1(x, y) := [x; y; z(x, y)]
K := Find(xk, yk, zk) = [15.5616; 8.84932; 10.1233]  # точка пересечения плоскости
Pline1 := CreateMesh(Pline1, K[1], xb - 1, K[2], yb, 10, 10)
K(x, y) := [K[1]; K[2]; K[3]]
f(t) := M + MN*t
Straight := CreateSpace(f, 0, 5, 10)
N(x, y) := [xn; yn; zn]
M(x, y) := [xm; ym; zm]
# [component: inputs Pline1, Straight, K, M, N]
# Задание 5. Построить прямую, проходящую через точку P и параллельную плоскости треугольника ABC
# Найдем для начала координаты вектора нормали к плоскости ABC
det(x, y, z) → 26*y - 18*x - 16*function + 212
n := [-18; 26; -16]  # нормаль к плоскости ABC
# Чтобы плоскость ABC была параллельная прямой PL, нужно, чтобы вектор PL был перпендикулярен вектору n
Given
xL := 1
yL := 1
zL := 1
# Пусть длина отрезка прямой PL равна, например, 10
(xL - xp)*n[1] + (yL - yp)*n[2] + (zL - zp)*n[3] == 0
sqrt((xL - xp)^2 + (yL - yp)^2 + (zL - zp)^2) == 10
L := Find(xL, yL, zL) = [9.99045; 10.2209; 1.61967]
PL := [L[1] - xp; L[2] - yp; L[3] - zp] = [-5.00955; -6.77912; -5.38033]  # направляющий вектор прямой PL, проходящей через точку P и параллельный плоскости ABC
xs := [xp, L[1]]
ys := [yp, L[2]]
zs := [zp, L[3]]
P(x, y) := [xp; yp; zp]
PL1 := [xs; ys; zs]
# [component: inputs Pline1, PL1, P]
# Задание 6. Построить перпендикуляр к плоскости ABC из точки P и найти его длину
n = [-18; 26; -16]  # вектор нормали к плоскости ABC
P := [xp; yp; zp] = [15; 17; 7]
PL = [-5.00955; -6.77912; -5.38033]
AB := [xb - xa; yb - ya; zb - za]
BC := [xc - xb; yc - yb; zc - zb]
AC := [xc - xa; yc - ya; zc - za]
# Пусть PH1 перпендикулярен плоскости ABC, где т. H1 лежит на этой плоскости
Given  # PH1 - будет являться нормалью
n = [-18; 26; -16]
xH1 := 1
yH1 := 1
zH1 := 1
AB[1]*(xp - xH1) + AB[2]*(yp - yH1) + AB[3]*(zp - zH1) == 0
BC[1]*(xp - xH1) + BC[2]*(yp - yH1) + BC[3]*(zp - zH1) == 0
det(xH1, yH1, zH1) == 0
H1 := Find(xH1, yH1, zH1) = [18.8981; 11.3694; 10.465]
P := [xp; yp; zp] = [15; 17; 7]
PH1Length := sqrt((xp - xH1)^2 + (yp - yH1)^2 + (zp - zH1)^2) = 22.0907  # длина перпендикуляра
PH1 := [xp - H1[1]; yp - H1[2]; zp - H1[3]] = [-3.89809; 5.63057; -3.46497]
Pline2 := CreateMesh(Pline, H1[1], 25, H1[2], 26, 10, 10)
xH1 := H1[1]
yH1 := H1[2]
zH1 := H1[3]
perp(t) := H1 + PH1*t
perpG := CreateSpace(perp, 0, 10, 50)
H1(x, y) := [H1[1]; H1[2]; H1[3]]
P(x, y) := [xp; yp; zp]
# [component: inputs Pline2, perpG, H1, P]
# Задание 7. Построить точку P1, являющуюся зеркальным отражением точки P относительно плоскости ABC
# Точка P1 будет лежать на прямой PH1, к тому же длина PH1 должна быть равна длине P1H1
z(x, y) := -18/16*x + 26/16*y + 306/16
Given
PH1 = [-3.89809; 5.63057; -3.46497]
xP1 := 1
yP1 := 1
zP1 := 1
sqrt((xP1 - xH1)^2 + (yP1 - yH1)^2 + (zP1 - zH1)^2) == sqrt((xp - xH1)^2 + (yp - yH1)^2 + (zp - zH1)^2)
(xP1 - xH1)/(xp - xH1) == (yP1 - yH1)/(yp - yH1) == (zP1 - zH1)/(zp - zH1)
xH1 = 18.8981
yH1 = 11.3694
zH1 = 10.465
P1 := [2*xH1 - xp; 2*yH1 - yp; 2*zH1 - zp] = [22.7962; 5.73885; 13.9299]
P(x, y) := [xp; yp; zp]
H1(x, y) := [xH1; yH1; zH1]
PP1 := [xp - P1[1]; yp - P1[2]; zp - P1[3]] = [-7.79618; 11.2611; -6.92994]
perpG(t) := P1 + PP1*t
perpNew := CreateSpace(perpG, 0, 10, 50)
P1(x, y) := [P1[1]; P1[2]; P1[3]]
Pline2 := CreateMesh(Pline, xH1, 25, yH1, 26, 10, 10)
# [component: inputs Pline2, P, P1, H1, perpNew]
# Задание 8. Построить плоскость, параллельную плоскости ABC через точку P
n = [-18; 26; -16]
# Найдем координаты новой параллельной плоскости, проходящей через точку P
det(x, y, z) → 26*y - 18*x - 16*function + 212
# у этой плоскости будет другой коэффициент D2 <> D1
A2 := -18
B2 := 26
C2 := -16
D2 := 1
det2(x, y, z) := A2*x + B2*y + C2*z + D2
D2(x, y, z) := -A2*x - B2*y - C2*z
D2(xp, yp, zp) = -60
# Плоскость ABC:
z(x, y) := -18/16*x + 26/16*y + 212/16
Pline1(x, y) := [x; y; z(x, y)]
Pline1 := CreateMesh(Pline1, xa, xb - 1, yc, yb, 10, 10)
# Параллельная плоскость:
z2(x, y) := -18/16*x + 26/16*y - 60/16
Pline2(x, y) := [x; y; z2(x, y)]
Pline2 := CreateMesh(Pline2, xa, xp, yc, yp, 10, 10)
# [component: inputs Pline1, Pline2, P]
# Задание 9. Построить плоскость, перпендикулярную плоскости ABC и проходящую через точку P
PL = [-5.00955; -6.77912; -5.38033]  # вектор прямой параллельной плоскости ABC будет нормалью для искомой плоскости
P := [xp; yp; zp] = [15; 17; 7]
det(x, y, z) → 26*y - 18*x - 16*function + 212
A1 := -18
B1 := 26
C1 := -16
D1 := 212
n := [A1; B1; C1] = [-18; 26; -16]  # нормаль к плоскости ABC
PH1 = [-3.89809; 5.63057; -3.46497]
A3 := PL[1]
B3 := PL[2]
C3 := PL[3]
D3 := 1
# Найдем D3 через условие принадлежности точки P искомой плоскости:
det3(x, y, z) := A3*x + B3*y + C3*z + D3
D3(x, y, z) := -A3*x - B3*y - C3*z
D3(xp, yp, zp) = 228.051
D3 := D3(xp, yp, zp)
# Плоскость ABC:
z(x, y) := -18/16*x + 26/16*y + 212/16
Pline1(x, y) := [x; y; z(x, y)]
Pline1 := CreateMesh(Pline1, xp, xb - 1, yp, yb, 10, 10)
# Перпендикулярная плоскость:
z3(x, y) := A3/(-C3)*x + B3/(-C3)*y + D3/(-C3)
Pline3(x, y) := [x; y; z3(x, y)]
Pline3 := CreateMesh(Pline3, xp, 1, yp, 1, 10, 10)
PL = [-5.00955; -6.77912; -5.38033]
f(t) := P + t*PL
n = [-18; 26; -16]
f1(t) := P + t*n
P(x, y) := [xp; yp; zp]
Parallel := CreateSpace(f, 0, 16, 50)
Perp := CreateSpace(f1, 0, 16, 50)
# [component: inputs Pline1, Pline3, P]
# Задание 10. Найти линию пересечения построенных плоскостей
det1(x, y, z) := A1*x + B1*y + C1*z + D1
A1 = -18
B1 = 26
C1 = -16
D1 = 212
det3(x, y, z) := A3*x + B3*y + C3*z + D3
A3 = -5.00955
B3 = -6.77912
C3 = -5.38033
D3 = 228.051
# Возьмем две точки (V,W), через которые проходит прямая пересечения плоскостей
Given
xV := 1
yV := 1
zV := 0  # Найдем точку V, подставив вместо zV значение 0
det1(xV, yV, 0) == 0
det3(xV, yV, 0) == 0
xV := 29.19
yV := 12.057
zV := 0
V := [xV; yV; zV] = [29.19; 12.057; 0]
Given
xW := 1
yW := 1
zW := 10  # Найдем точку W, подставив вместо zV значение 10
det1(xW, yW, 10) == 0
det3(xW, yW, 10) == 0
xW := 19.35
yW := 11.39
zW := 10
W := [xW; yW; zW] = [19.35; 11.39; 10]
nVW := [W[1] - V[1]; W[2] - V[2]; W[3] - V[3]] = [-9.84; -0.667; 10]
fVW(t) := V + nVW*t
VW := CreateSpace(fVW, 0, 10, 50)
Pline1(x, y) := [x; y; z(x, y)]
Pline3(x, y) := [x; y; z3(x, y)]
Pline1 := CreateMesh(Pline1, xV, xW - 10, yV + 1, yb, 10, 10)
Pline3 := CreateMesh(Pline3, xV, 1, yW + 10, 1, 10, 10)
V(x, y) := [xV; yV; zV]
W(x, y) := [xW; yW; zW]
# [component: inputs Pline1, Pline3, VW, V, W]
# Задание 14
# Построить плоскость ABP, содержащую прямую AB и точку P
P := [xp; yp; zp] = [15; 17; 7]
A := [xa; ya; za] = [13; 7; 10]
B := [xb; yb; zb] = [12; 2; 3]
# Построим плоскость через 3 заданные точки:
detABP(x, y, z) := det([
    x - A[1], y - A[2], z - A[3];
    B[1] - A[1], B[2] - A[2], B[3] - A[3];
    P[1] - A[1], P[2] - A[2], P[3] - A3
]) → 9.95223981681*x - 1.99044796336*y - 115.445981875
# Коэффициент z равен нулю, значит все 3 точки лежат на одной прямой, то есть P принадлежит AB
# Пусть z = 1
zABP(x, y) := -9.95*x + 1.99*y + 115.44
PABPLine(x, y) := [x; y; zABP(x, y)]
ABP := CreateMesh(PABPLine, A[1] - 10, P[1] + 1, P[2], B[2], 10, 10)
xs := [A[1], B[1]]
ys := [A[2], B[2]]
zs := [A[3], B[3]]
AB := [xs; ys; zs]
A(x, y) := [A[1]; A[2]; A[3]]
B(x, y) := [B[1]; B[2]; B[3]]
P(x, y) := [P[1]; P[2]; P[3]]
# [component: inputs Pline1, A, B, AB, P, ABP]
# Задание 12. Построить плоскость, перпендикулярную плоскостям из задания 10
# Плоскость ABC:
z(x, y) := -18/16*x + 26/16*y + 212/16
Pline1(x, y) := [x; y; z(x, y)]
Pline1 := CreateMesh(Pline1, xV, xW - 10, yV + 1, yb, 10, 10)
# Перпендикулярная плоскость:
z3(x, y) := A3/(-C3)*x + B3/(-C3)*y + D3/(-C3)
Pline3(x, y) := [x; y; z3(x, y)]
Pline3 := CreateMesh(Pline3, xV, 1, yW + 10, 1, 10, 10)
# Для нахождения третьей перпендикулярной плоскости, возьмем найденную линию пересечения плоскостей VW:
VW := [xW - xV; yW - yV; zW - zV] = [-9.84; -0.667; 10]
W := [xW; yW; zW] = [19.35; 11.39; 10]
V := [xV; yV; zV] = [29.19; 12.057; 0]
# Вектор линии VW будет нормалью к искомой плоскости
# Пусть искомая плоскость проходит через точку W
A4 := VW[1]
B4 := VW[2]
C4 := VW[3]
D4 := 1
det4(x, y, z) := A4*x + B4*y + C4*z + D4
D4(x, y, z) := -A4*x - B4*y - C4*z
D4 := D4(xW, yW, zW) = 98.0011
# Искомая новая перпендикулярная плоскость:
z4(x, y) := A4/(-C4)*x + B4/(-C4)*y + D4/(-C4)
Pline4(x, y) := [x; y; z4(x, y)]
Pline4 := CreateMesh(Pline4, xW + 10, 1, yW + 30, 1, 10, 10)
nVW := (W - V)/|W - V|
fVW(t) := V + nVW*t
VW := CreateSpace(fVW, 0, 10, 50)
# [component: inputs Pline1, Pline3, Pline4, VW]
# Задание 13. Построить биссекторную плоскость для плоскостей из пункта 10
# Найдем на плоскости ABC прямую WL, перпендикулярную прямой VW - линии пересечения перпендикулярных плоскостей
VW := [xW - xV; yW - yV; zW - zV] = [-9.84; -0.667; 10]
# Найдем из скалярного произведения перпендикулярных векторов координаты вектор этой прямой(WL):
Given
xL := 1
yL := 1
zL := 1
W := [xW; yW; zW]
Given
det(xL, yL, zL) == 0  # условие принадлежности точки L плоскости ABC
VW[1]*(xL - xW) + VW[2]*(yL - yW) + VW[3]*(zL - zW) == 0
sqrt((xL - xW)^2 + (yL - yW)^2 + (zL - zW)^2) == 10
L := Find(xL, yL, zL) = [14.3388; 4.61423; 4.61701]
xL := L[1]
yL := L[2]
zL := L[3]
# Представив задачу в плоскости, становится очевидным то, что угол между биссектрисой плоского угла между плоскостями и между найденной прямой WL равен 45 градусов
# Переходим в плоскость, в которой лежат эти две прямые, и понимаем, что, если мы проведем к биссектрисе перпендикуляр (который будет являться по итогу нормалью к искомой биссекторной плоскости), то угол между этой нормалью и прямой WL будет равен 90 +- 45 градусов (то есть 45 или 135 градусов). Пусть угол будет равен 45 градусов (не имеет значения)
WL := [xL - xW; yL - yW; zL - zW] = [-5.01123; -6.77577; -5.38299]
WLLength := sqrt(WL[1]^2 + WL[2]^2 + WL[3]^2) = 10
# Тогда пользуемся формулой скалярного произведения между векторами WL и искомым вектором WF(нормалью к искомой биссекторной плоскости):
Given
xF := 1
yF := 1
zF := 1
(WL[1]*(xF - xW) + WL[2]*(yF - yW) + WL[3]*(zF - zW))/(WLLength*sqrt((xF - xW)^2 + (yF - yW)^2 + (zF - zW)^2)) == sqrt(2)/2  # косинус 45 градусов
# К тому же, точка F должна принадлежать плоскости (надо бы проверить это условие тоже)
F := Find(xF, yF, zF) = [-2.59169; 7.27709; 5.75297]
xF := F[1]
yF := F[2]
zF := F[3]
# После нахождения точки F находим координаты вектора WF, это будут координаты для канонического уравнения искомой биссекторной плоскости.
# Затем через принадлежность плоскости точки W составляем уравнение этой плоскости и строим его по стандартному алгоритму
W = [19.35; 11.39; 10]
WF := [xF - xW; yF - yW; zF - zW] = [-21.9417; -4.11291; -4.24703]
# Вектор линии WF будет нормалью к искомой биссекторной плоскости
# Пусть искомая плоскость проходит через точку W
Ab := WF[1]
Bb := WF[2]
Cb := WF[3]
Db := 1
detb(x, y, z) := Ab*x + Bb*y + Cb*z + Db
Db(x, y, z) := -Ab*x - Bb*y - Cb*z
Db := Db(xW, yW, zW) = 513.888
# Искомая биссекторная плоскость к нашим перпендикулярным плоскостям Pline1 и Pline3:
zb(x, y) := Ab/(-Cb)*x + Bb/(-Cb)*y + Db/(-Cb)
Plineb(x, y) := [x; y; zb(x, y)]
Pline1(x, y) := [x; y; z(x, y)]
Pline3(x, y) := [x; y; z3(x, y)]
PlineX := CreateMesh(Pline1, xV, xW - 10, yV + 1, yb, 10, 10)
PlineY := CreateMesh(Pline3, xV, 1, yW + 10, 1, 10, 10)
Plineb := CreateMesh(Plineb, xV, 1, yW + 10, 1, 10, 10)
# [component: inputs PlineX, PlineY, Plineb]
# Задание 15. Найти линию пересечения плоскостей из пункта 10
# Ниже приравниваем определители перпендикулярных плоскостей, для которых мы ищем линию пересечения, к нулю
det1(x, y, z) := A1*x + B1*y + C1*z + D1
det3(x, y, z) := A3*x + B3*y + C3*z + D3
# Возьмем две точки (V,W), через которые проходит прямая пересечения плоскостей
Given
xV := 1
yV := 1
zV := 0  # Найдем точку V, подставив вместо zV значение 0
det1(xV, yV, 0) == 0
det3(xV, yV, 0) == 0
xV := 29.19
yV := 12.057
zV := 0
V := [xV; yV; zV] = [29.19; 12.057; 0]
Given
xW := 1
yW := 1
zW := 10  # Найдем точку W, подставив вместо zV значение 10
det1(xW, yW, 10) == 0
det3(xW, yW, 10) == 0
xW := 19.35
yW := 11.39
zW := 10
W := [xW; yW; zW] = [19.35; 11.39; 10]
nVW := [W[1] - V[1]; W[2] - V[2]; W[3] - V[3]] = [-9.84; -0.667; 10]
fVW(t) := V + nVW*t
VW := CreateSpace(fVW, 0, 10, 50)
Pline1(x, y) := [x; y; z(x, y)]
Pline3(x, y) := [x; y; z3(x, y)]
Pline1 := CreateMesh(Pline1, xV, xW - 10, yV + 1, yb, 10, 10)
Pline3 := CreateMesh(Pline3, xV, 1, yW + 10, 1, 10, 10)
V(x, y) := [xV; yV; zV]
W(x, y) := [xW; yW; zW]
# [component: inputs Pline1, Pline3, VW, V, W]
