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x(t) := 3 - 3*cos(2*t)
y(t) := 6*sin(2*t)^2 + 4
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p(t) := y(t)/(2*x(t)^2)
# Чтобы получить явное представление этой кривой, треубется выразить y через фунцкию от параметра x:
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y(t) := (1 - cos(4*t))/2*6 + 4
p := p(10) = 1.4272
# Вершина параболы имеет координаты:
cx := 3
cy := 10
(y - cy)^2 == 2*p(x - cx)  # solve
par(y) := ((cy - y)^2 + 2*cx*p)/(2*p)
# Построение параболы с помощью явного представления:
y := -30 .. 50
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Эллипс
x0 := 14
y0 := 12
a0 := 9
b0 := 5
Гипербола
x10 := 16
y10 := 18
a1 := 18
b1 := 12
Парабола
x20 := 12
y20 := 5
p := 14
# Построение эллипса:
(x - x0)^2/a0^2 + (y - y0)^2/b0^2 == 1
y(x) := sqrt(b0^2 - b0^2/a0^2*((x - x0)^2))
y1(x) := y0 + y(x)
y2(x) := y0 - y(x)
x := 0 .. 30
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# Построение эллипса по явному уравнению:
φ := 0, 0.1*π .. 2*π
x(φ) := a0*cos(φ) + x0
y(φ) := b0*sin(φ) + y0
# Построение эллипса по параметрическому уравнению:
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Гипербола
(x - x10)^2/a1^2 - (y - y10)^2/b1^2 == 1
y(x) := sqrt(b1^2 + b1^2/a1^2*(x - x10)^2)
y1(x) := y10 + y(x)
y2(x) := y10 - y(x)
x := -20 .. 20
# Построение гиперболы с помощью непараметрического представления:
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φ := 0, 0.1*π .. 2*π
x(t) := a1*(e^t + e^(-t))/2 + x10
y1(t) := b1*(e^t - e^(-t))/2 + y10
# Построение гиперболы с помощью параметрического представления:
t := -5 .. 2
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Парабола
(y - y20)^2 == 2*p*(x - x20)  # solve
par(y) := ((y20 - y)^2 + 2*x20*p)/(2*p)
# Построение параболы с помощью непараметрического представления:
y := -30 .. 40
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x(t) := t^2/(2*p)
y(t) := t
t := -10 .. 10
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# Построение параболы с помощью параметрического представления:
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# Фигура Лиссажу
ωx := 6
ωy := 17
α := π/2
t := 0, 0.1*π .. 2*π
x(a, t) := ωx*sin(a*t + α)
y(b, t) := ωy*sin(b*t)
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# Спираль Бернулли
r0 := 12
r1 := 3
r(t) := r0*e^(r1*t)
y(t) := r(t)*ln(t)
t1 := 0, 0.1*π .. 2*π
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# Улитка Паскаля:
a := 10
b := 6
(x^2 + y^2 + a*y)^2 == b^2*(x^2 + y^2)
x3(t) := 2*a*cos(t) - b*cos(2*t)
y3(t) := 2*a*sin(t) - b*sin(2*t)
t := 6 .. 10
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Гипоциклоида
r := 4
R := 14
x(t) := (r0 - r1)*sin(t) - r1*sin((r0/r1 - 1)*t)
y(t) := (r0 - r1)*cos(t) + r1*cos((r0/r1 - 1)*t)
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# Построение касательной и нормали к кривой в заданной точке
f(x) := x^3 + 4*sqrt(x^3)
a := 1
f1(x) := d/dx(f(x)) → 6*x^2/sqrt(x^3) + 3*x^2
f1(a) = 9
kas(x) := f(a) + f1(a)*(x - a)
n(x) := f(a) - 1/f1(a)*(x - a)
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ft(t) := 3^(1/2)*cos(t^2)
yt(t) := sin(t^3)
t0 := π/3
# Построение касательной и нормали к кривой, заданной параметрически:
# Для начала требуется построить касательную к этой кривой в точке a, соответствующей параметру t = t0:
a := ft(t0)
a = 0.79086
yt(t0) = 0.912101
# Найдем первую производную:
ft1(t) := d/dt(ft(t)) → -2*sqrt(3)*t*sin(t^2)
yt1(t) := d/dt(yt(t)) → 3*t^2*cos(t^3)
# Уравнение касательной в точке a:
kast(x) := yt(t0) + (x - a)*yt1(t0)/ft1(t0)
# Уравнение нормали в точке a:
nt(x) := yt(t0) - ft1(t0)/yt1(t0)*(x - a)
th := -4 .. 4
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# Будем строить линии в параметрическом виде:
Прямая
x1 := -18
y1 := -16
x2 := 13
y2 := 14
# Эллипс
x10 := 20
y10 := 9
a1 := 14
b1 := 3
Гипербола
x20 := 7
y20 := 16
a2 := 3
b2 := 8
Парабола
x30 := 12
y30 := 10
p := 7
Прямая
f1(t) := x1 + (x2 - x1)*t
f2(t) := y1 + (y2 - y1)*t
Эллипс
φ := 0, 0.1*π .. 2*π
f11(φ) := a1*cos(φ) + x10
f12(φ) := b1*sin(φ) + y10
t := 1
φ := 0
ORIGIN := 1
Given
f1(t) == f11(φ)
f2(t) == f12(φ)
t1 := Find(t, φ) = [0.903346; 2.36602]
A := [f1(t1[1]); f2(t1[1])]
A = [10.0037; 11.1004]  # точка пересечения прямой и эллипса
t := 1
φ := 0
Given
f1(t) == f11(φ)
f2(t) == f12(φ)
t < 0.9
t2 := Find(t, φ) = [0.800009; -2.80185]
B := [f1(t2[1]); f2(t2[1])] = [6.80028; 8.00027]  # вторая точка пересечения прямой с эллипсом
Гипербола
φ := 0, 0.1*π .. 2*π
f21(t) := a2*(e^t + e^(-t))/2 + x20
f22(t) := b2*(e^t - e^(-t))/2 + y20
Given
t := 0
k := 0
t2 := [1.2; 4]
f1(t) == f21(k)
f2(t) == f22(k)
t1 := Find(t, k) = [0.917362; -0.534131]
C := [f1(t1[1]); f2(t1[1])] = [10.4382; 11.5209]  # точка пересечения прямой с правой веткой гиперболы
Парабола
f31(t) := x30 + t^2/(2*p)
f32(t) := t + y30
m := x1 .. x2
mh := -3 .. 3
Given
t := 0
k := 0
f1(t) == f31(k)
f2(t) == f32(k)
t1 := Find(t, k) = [1.01086; 4.32568]
D := [f1(t1[1]); f2(t1[1])] = [13.3365; 14.3257]  # первая точка пересечения параболы с прямой
Given
f1(t) == f31(k)
f2(t) == f32(k)
Find(t, k) = [1.01086; 4.32568]
E := [f1(t2[1]); f2(t2[1])] = [19.2; 20]  # вторая точка пересечения параболы с прямой
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# Кривая 1
ORIGIN := 1
x > 0
y(x) := sin(2*x)*ln(x)
# Кривая 2 - гиперболический котангенс
cth(x, h) := (e^(2*x) + 1)/(e^(2*x) - 1) + h
(h - свободный)*коэффициент
Given
x := 1
h := 1
y(x) == cth(x, h)
xa := Find(x, h) = [1.41477; -1.01897]
A := [xa[1]; y(xa[1])] = [1.41477; 0.106522]  # точка пересечения 1 и 2 кривых
Given
h := xa[2]
y(x) == cth(x, h)
x > 3
xb := Find(x) = 3.13495
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# вторая точка пересечения кривых
Given
y(x) == cth(x, h)
x > 4
xc := Find(x)  # error: This variable is undefined.
# точка не находится, а значит точек пересечения больше не существует, цель задания выполнена, было найдено и вычислено ровно 2 точки пересечения
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# Построим окружности A и B:
# Окружность A
xa := 14
ya := 17
Ra := 14
# Окружность B
xb := 14
yb := 7
Rb := 11
xa1(φ) := Ra*cos(φ) + xa
# Координаты точек A, B, C и D:
ya1(φ) := Ra*sin(φ) + ya
xA := 16
yA := 26
xB := 10
yB := 6
xb1(φ) := Rb*cos(φ) + xb
xC := 4
yC := 15
xD := 8
yD := 8
yb1(φ) := Rb*sin(φ) + yb
# Зададим параметрические уравнения прямых AB и CD:
fAB1(t) := xA + (xB - xA)*t
fAB2(t) := yA + (yB - yA)*t  # прямая AB
fCD1(t) := xC + (xD - xC)*t
fCD2(t) := yC + (yD - yC)*t  # прямая CD
# Построим вспомогательные окружности:
R := 20  # дуга окружности
r1 := R - Ra
r2 := R - Rb
# Первая вспомогательная окружность:
xa11(φ) := r1*cos(φ) + xa
ya11(φ) := r1*sin(φ) + ya
# Вторая вспомогательная окружность:
xb11(φ) := r2*cos(φ) + xb
yb11(φ) := r2*sin(φ) + yb
# Найдем точку пересечения:
Given
t := 0
k := 0
xa11(t) == xb11(k)
ya11(t) == yb11(k)
xa11(t) > 10
t := Find(t, k) = [-0.476119; 0.936613]
X := [xa11(t[1]); ya11(t[1])] = [19.3327; 14.25]  # найденный центр для построения будущего сопряжения
# Далее строим окружность, которая касается внутренней стороны наших окружностей A и B:
XSopr(φ) := R*cos(φ) + X[1]
YSopr(φ) := R*sin(φ) + X[2]
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# Далее найдем точки пересечения полученной окружности и прямых AB и CD:
Given
t := 0
k := 0
fAB1(t) < 10
fAB1(t) == XSopr(k)
fAB2(t) == YSopr(k)
t1 := Find(t, k) = [1.39782; -2.19689]  # точка пересечения прямой AB и полученной окружности (не в точке касания)
M := [fAB1(t1[1]); fAB2(t1[1])] = [7.61306; -1.95648]
Given
t := 0
k := 0
fCD1(t) == XSopr(k)
fCD2(t) == YSopr(k)
fCD2(t) > 10
t2 := Find(t, k) = [-0.867145; -3.48957]  # точка пересечения прямой CD и полученной окружности (не в точке касания)
N := [fCD1(t2[1]); fCD2(t2[1])] = [0.531421; 21.07]
# Ограничим нашу полученную линию сопряжения этими точками и построим рисунок:
g := t2[2] .. t1[2]
g := 0.9*π, 0.95*π .. 1.3*π
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