# Задание 1
x1 := 8
y1 := 4  # точка p1
x2 := 19
y2 := 8  # точка p2
x3 := 2
y3 := 3  # точка p3
x4 := 9
y4 := 17  # точка p4
x5 := 2
y5 := 8  # точка p5
P(x, y) := [x; y]
Y := [y1; y2; y4; y5; y3; y1]
X := [x1; x2; x4; x5; x3; x1]
X = [8; 19; 9; 2; 2; 8]
Y = [4; 8; 17; 8; 3; 4]
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P4
P5
# P3 | P2
P1
# Задание 2
# Возьмем точки S1, S2, S3, S1 - середина P1P2, S2 - середина P2P4, S3 - середина P4P5
S(k1, k2, k3, k4) := [(k1 + k2)/2; (k2 + k3)/2; (k3 + k4)/2; (k1 + k2)/2]
Sx := S(x1, x2, x4, x5)
Sx = [13.5; 14; 5.5; 13.5]
Sy := S(y1, y2, y4, y5)
Sy = [6; 12.5; 12.5; 6]
Length(Sx, Sy, k1, k2) := sqrt((Sx[k2] - Sx[k1])^2 + (Sy[k2] - Sy[k1])^2)
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Perimetr(Sx, Sy, k1, k2, k3) := Length(Sx, Sy, k1, k2) + Length(Sx, Sy, k1, k3) + Length(Sx, Sy, k2, k3)
P4
P := Perimetr(Sx, Sy, 0, 1, 2) = 25.327
S3
# P5 | S2
P2
S1
# P3 | P1
# Задание 3
# Запишем уравнения прямых, образующих стороны треугольника S1S2,S2S3,S3S1
# Общий вид левой или правой части неявно заданного уравнения прямой
F(x, y, k1, k2) := x*(Sy[k2] - Sy[k1]) + y*(Sx[k1] - Sx[k2]) + Sx[k2]*Sy[k1] - Sx[k1]*Sy[k2]
Sy = [6; 12.5; 12.5; 6]
Sx = [13.5; 14; 5.5; 13.5]
# Если выразить y через x из уравнения F(x,y), то получим:
# y = x * (ay - by)/(ax-bx) + (axby - bx*ay)/(ax - bx)
M1(k1, k2) := (Sy[k1] - Sy[k2])/(Sx[k1] - Sx[k2])
M2(k1, k2) := (Sx[k1]*Sy[k2] - Sx[k2]*Sy[k1])/(Sx[k1] - Sx[k2])
G(x, k1, k2) := x*M1(k1, k2) + M2(k1, k2)  # каноническое уравнение в неявной форме
f1(xm1) := G(xm1, 0, 1)
M1(0, 1) = 13
M2(0, 1) = -169.5  # первая сторона треугольника S1S2 (f1(x))
f2(xm2) := G(xm2, 1, 2)
M1(1, 2) = 0
M2(1, 2) = 12.5  # вторая сторона треугольника S1S2 (f1(x))
f3(xm3) := G(xm3, 0, 2)
M1(0, 2) = -0.8125
M2(0, 2) = 16.9688  # третья сторона треугольника S1S2 (f1(x))
F(x, y, 0, 1) == 6.5*x - 0.5*y - 84.75
# неявные уравнения прямых, образующих стороны треугольника
F(x, y, 1, 2) == 8.5*y - 106.25
F(x, y, 0, 2) == 6.5*x + 8*y - 135.75
# Параметрическая модель прямой линии:
x1(t, k1, k2) := Sx[k1] + t*(Sx[k2] - Sx[k1])
y1(t, k1, k2) := Sy[k1] + t*(Sy[k2] - Sy[k1])
# Первая сторона треугольника: | Вторая сторона треугольника: | Третья сторона треугольника:
x1(t, 0, 2) == 13.5 - 8*t
x1(t, 1, 2) == 14 - 8.5*t
x1(t, 0, 1) == 13.5 + 0.5*t
y1(t, 0, 2) == 6 + 6.5*t
y1(t, 1, 2) == 12.5
y1(t, 0, 1) == 6 + 6.5*t
# Задание 4
# Построение треугольника по неявных уравнениям
xm1 := Sx[3] - 0.5 .. Sx[1]
xm2 := Sx[1] .. Sx[2]
xm3 := Sx[0] .. Sx[2]
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S2
S3
S1
# Задание 5
# Построение треугольника с использованием полученных параметрических уравнений
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S2
S3
S1
# Задание 6
# Опустить перпендикуляр P1H на сторону P3P4(в данном примере такой стороны нет, поэтому просто на прямую P3P4)
# Напишем уравнение прямой, проходящей через точки P3 P4:
k := (y4 - y3)/(x4 - x3)
L34(x) := k*(x - x3) + y3
x := x3 .. x4
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P4
P5
P2
# P3 | P1
# Затем опустим перпендикуляр из точки P1 на прямую P3P4, для этого найдем координату точки Н - основания перпендикуляра, лежащей на P3P4
# Условие перпендикулярности: P1Н (вектор)*P3P4(вектор) = 0
X[0] = 8
Y[0] = 4  # координаты точки P1
x3 = 2
y3 = 3  # координаты точки P3
x4 = 9
y4 = 17  # координаты точки P4
x34 := x4 - x3 = 7
y34 := y4 - y3 = 14  # координаты вектора P3P4
x1h(xh) := X[0] - xh
y1h(yh) := Y[0] - yh  # координаты вектора P1H, H (xh,yh)
# Составим систему уравнений для нахождения координат точки H:
Given
xh := 1
yh := 2
L34(xh) == yh
x34*x1h(xh) + y34*y1h(yh) == 0
H := Find(xh, yh)
H = [3.6; 6.2]
xh := H[0] = 3.6
yh := H[1] = 6.2
# Затем составляем уравнение прямой P1H, проходящей через две точки P1(x1,y1) и H(xh,yh):
k := (yh - Y[0])/(xh - X[0]) = -0.5
P1H(x) := k*(x - X[0]) + Y[0]
xm1 := xh .. X[0]
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P4
# P5 | P2
H
P1
P3
# Задание 7
# Через точку P1 провести отрезок прямой параллельной P3P4.
# Длина отрезка должна быть равна длине отрезка P3P4 и P1 - должна быть серединой этого отрезка
P3P4 := [x34; y34] = [7; 14]  # координаты вектора P3P4
P3P4Length := sqrt((x4 - x3)^2 + (y4 - y3)^2) = 15.6525
# длина отрезка P3P4
AB(xA, xB, yA, yB) := [xB - xA; yB - yA]  # вектор AB
# Найдем сначала координату точки A, для этого напишем вид вектора P1A:
P1A(xA, yA) := [xA - 8; yA - 4]
# Вектор P1A  коллинеарен вектору P3P4
# Тогда отношения их координат должны быть равны
# То есть P1A(x)/P3P4(x) = P1A(y)/P3P4(y) - первое уравнение
# Второе уравнение основывается на том, что длина P1A - равна половине длины отрезка P3P4
# Ну и допустим, что абсцисса точки A будет меньше абсциссы точки P1 (чтобы получить точную координату точки A)
X[0] = 8
Y[0] = 4  # координаты точки P1 (сразу подставлю их в уравнения)
Given
xA := 2
yA := 2
(xA - 8)/P3P4[0] == (yA - 4)/P3P4[1]
sqrt((xA - 8)^2 + (yA - 4)^2) == P3P4Length/2
xA < 8
A := Find(xA, yA) = [4.5; -3]
xA := A[0]
yA := A[1]  # координаты точки A
# Затем найдем точку B, которая лежит на прямой P1A.
# Также мы знаем, что длина отрезка AB равна длине отрезка P3P4
# Найдем уравнение прямой P1A, проходящей через 2 точки: P1 (8,4) и A (4,5, -3)
k := (yA - Y[0])/(xA - X[0])
P1A(xm) := k*(xm - X[0]) + Y[0]
Given
xB := 1
yB := 1
P1A(xB) == yB
sqrt((xB - xA)^2 + (yB - yA)^2) == P3P4Length
B := Find(xB, yB) = [11.5; 11]
xB := B[0]
yB := B[1]  # координаты точки B
xm := xA .. xB
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P4
# P5 | B
P2
# P3 | P1
A
# Задание 8
# Найти P6 - точку пересечения прямых P2P3 и P4P5
# Найдем уравнение прямой P2P3:
k1 := (y3 - y2)/(x3 - x2)
P2P3(x) := k1*(x - x2) + y2
# Найдем уравнение прямой P4P5:
k2 := (y5 - y4)/(x5 - x4)
P4P5(x) := k2*(x - x4) + y4
Given
x6 := 1
y6 := 1
P2P3(x6) == y6
P4P5(x6) == y6
P6 := Find(x6, y6) = [-3.04237; 1.51695]
x6 := P6[0] = -3.04237
xn1 := x6 .. x2
y6 := P6[1] = 1.51695
xn2 := x6 .. x5
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P4
P5
P2
P3
# P6 | P1
# Далее найдем угол между прямыми P5P4 и P3P2:
# cos угла P5P6P3 равен скалярному произведению векторов P4P5 и P2P3, деленному на произведение длин этих векторов
P4P5 := [x5 - x4; y5 - y4] = [-7; -9]
# координаты векторов P2P3 и P4P5
P2P3 := [x3 - x2; y3 - y2] = [-17; -5]
P4P5Length := sqrt(P4P5[0]^2 + P4P5[1]^2)  # длины векторов P2P3 и P4P5
P2P3Length := sqrt(P2P3[0]^2 + P2P3[1]^2)
cos := (P2P3[0]*P4P5[0] + P2P3[1]*P4P5[1])/(P2P3Length*P4P5Length) = 0.811722
α := acos(cos)*180/π = 35.7355  # то есть искомый угол P5P6P3 равен 35,735 градусов
# Задание 9
# Построить точку P0, симметричную точке P1 относительно прямой P3P4
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P4
# P5 | P2
P1
P3
# Проведем прямую через точку P1, перпендикулярную прямой P3P4 аналогично задаче 6
H = [3.6; 6.2]
# Этой прямой будет являться прямая P1H, уравнение которой уже было найдено в задаче 6
# Затем остается найти координату симметричной точки P1
# Эта точка лежит на прямой P1H и длина отрезка P1H равна длине отрезка P0H, причем точки P0 и P1 находятся по разную сторону от прямой P3P4
X[0] = 8
Y[0] = 4
Given  # координаты точки P1
xP0 := 1
yP0 := 1
P1H(xP0) == yP0
sqrt((xh - X[0])^2 + (yh - Y[0])^2) == sqrt((xh - xP0)^2 + (yh - yP0)^2)
xP0 < xh
P0 := Find(xP0, yP0) = [-0.800001; 8.4]
xP0 := P0[0]
yP0 := P0[1]  # координаты точки P0
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P4
# P0 | P5
P2
# P3 | P1
