# Вариант 24 | Задание 1
x := 2 .. 4
y(x) := 3*x - 4*ln(x) - 5
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x1 := 3.25
-приближенное*значение
TOL := 10^-4
answer := root(y(x), x, 3, 4)  # TOL
answer = 3.22996
# Задание 2
a := 2
φ := 0 .. 50
r(φ) := a^2*φ
# Построение кривой спирали Ферма в полярной системе координат
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# Задание 3
# Построение трехмерного графика
z(x, y) := x^2*cos(y)
# Surface Plot
# [component: inputs z]
# Задание 4
# Графическое отображение матрицы
n := 10  # количество элементов в строках и столбцах квадратной матрицы
i := 1 .. n
f(i, j) := (i + 2)*(j - 4)
j := 1 .. n
# Задание квадратной матрицы через функцию f
A[i, j] := f(i, j)  # Contour Plot
# 3D Scatter Plot
# Surface Plot
# [component: inputs A]
# [component: inputs A]
# [component: inputs A]
# 3D Bar Chart | Vector Field Plot
# [component: inputs A]
# [component: inputs A]
A = [
    0, 0, 0, 0, 0, 0, 0, 0, 0, 0, 0;
    0, -9, -6, -3, 0, 3, 6, 9, 12, 15, 18;
    0, -12, -8, -4, 0, 4, 8, 12, 16, 20, 24;
    0, -15, -10, -5, 0, 5, 10, 15, 20, 25, 30;
    0, -18, -12, -6, 0, 6, 12, 18, 24, 30, 36;
    0, -21, -14, -7, 0, 7, 14, 21, 28, 35, 42;
    0, -24, -16, -8, 0, 8, 16, 24, 32, 40, 48;
    0, -27, -18, -9, 0, 9, 18, 27, 36, 45, 54;
    0, -30, -20, -10, 0, 10, 20, 30, 40, 50, 60;
    0, -33, -22, -11, 0, 11, 22, 33, 44, 55, 66;
    0, -36, -24, -12, 0, 12, 24, 36, 48, 60, 72
]
# Задание 5
# Анимация движения точки по графику f(x)
x := 2 .. 4
f(x) := 3*x - 4*ln(x) - 5
x1 := 2 + FRAME/5
задание*шага*анимации
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