# Задание 2
# Построить на плоскости заданную кривую согласно явной форме. В интервале x = 3 .. 6 построить на полученной кривой другим цветом 12 точек
ORIGIN := 1
y(x) := x^3/5 + x^2
i := 1 .. 12
t1[i] := 3 + (i - 1)*0.25
t2[i] := y(t1[i])
t1[i] = [3; 3.25; 3.5; 3.75; 4; 4.25; 4.5; 4.75; 5; 5.25; 5.5; 5.75]
t2[i] = [14.4; 17.4281; 20.825; 24.6094; 28.8; 33.4156; 38.475; 43.9969; 50; 56.5031; 63.525; 71.0844]
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# Задание 3
# На копии рисунка другим цветом построить полином Лагранжа
i := 1 .. 12
j := i
L(t) :=
    l ← 0
    for j ∈ 1 .. 12
        p ← l
        for j ∈ 1 .. 12
            p ← p*((t - t1[j])/(t1[i] - t1[j])) if i ≠ j
        l ← l + t2[i]*p
    l
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# Задание 4. Построить на плоскости заданную кривую. Построить на заданной замкнутой кривой другим цветом не менее 12 точек. По полученным точкам на том же рисунке другим цветом построить полином Лагранжа
r0 := 9
r1 := 12
x(t) := (r0 - r1)*sin(t) - r1*sin((r0/r1 - 1)*t)
y(t) := (r0 - r1)*cos(t) + r1*cos((r0/r1 - 1)*t)
t := 0, 0.1*π .. 2*π
i := 1 .. 12
j := i
t1[i] := 5 + (i - 1)*0.5
t2[i] := y(t1[i])
Lagr(t, x, y) := y[1]*product((t - x[j])/(x[1] - x[j]), j = 2 .. 12) + y[12]*product((t - x[j])/(x[12] - x[j]), j = 1 .. 11) + sum(y[i]*product((t - x[j])/(x[i] - x[j]), j = 1 .. i - 1)*product((t - x[j])/(x[i] - x[j]), j = i + 1 .. 12), i = 2 .. 11)
T[i] := i*2*π/12
X[i] := x(T[i])
Y[i] := y(T[i])
k := 1 .. 200
p[k] := T[1] + (T[12] - T[1])*k/200
Lx(p) := Lagr(p, T, X)
Ly(p) := Lagr(p, T, Y)
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# Задание 5. На копии построенного в п.2 рисунка по полученным точкам построить другим цветом полином Эрмита
ORIGIN := 1
y(x) := x^3/5 + x^2
i := 1 .. 12
t1[i] := 3 + (i - 1)*0.25
t2[i] := y(t1[i])
# Полином Эрмита:
f(t) := t^3/5 + t^2
p(t) := d/dt(f(t))
X[i] := i
Y[i] := f(X[i])
pY[i] := p(X[i])
i := 1 .. 11
h[i] := X[i + 1] - X[i]
a0(v) := 1 - 3*v^2 + 2*v^3
a1(v) := 3*v^2 - 2*v^3
b0(v) := v - 2*v^2 + v^3
b1(v) := -v^2 + v^3
Ermit(t) :=
    E ← 0
    for i ∈ 1 .. 11
        if X[i] ≤ t ≤ X[i + 1]
            z ← (t - X[i])/h[i]
            E ← Y[i]*a0(z) + Y[i + 1]*a1(z) + pY[i]*b0(z)*h[i] + pY[i + 1]*b1(z)*h[i]
    E
# Построение полинома Эрмита на графике исходной функции y = x^3/5 + x^2
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# Задание 6. На копии построенного в пункте 2 рисунка построить другим цветом кривую Безье третьей степени
n := 12
m := n/4 = 3
ORIGIN := 1
y(x) := x^3/5 + x^2
i := 1 .. n - (m - 1)
X[i] = [1; 2; 3; 4; 5; 6; 7; 8; 9; 10]
t1[i] := 3 + (i - 1)*0.25
Y[i] = [1.2; 5.6; 14.4; 28.8; 50; 79.2; 117.6; 166.4; 226.8; 300]
X[i] := i
Y[i] := f(X[i])
t2[i] := y(t1[i])
P1x3(t) := (1 - t)^3*X[1] + 3*t*(1 - t)^2*X[2] + 3*t^2*(1 - t)*X[3] + t^3*X[4]
P1y3(t) := (1 - t)^3*Y[1] + 3*t*(1 - t)^2*Y[2] + 3*t^2*(1 - t)*Y[3] + t^3*Y[4]
P2x3(t) := (1 - t)^3*X[4] + 3*t*(1 - t)^2*X[5] + 3*t^2*(1 - t)*X[6] + t^3*X[7]
P2y3(t) := (1 - t)^3*Y[4] + 3*t*(1 - t)^2*Y[5] + 3*t^2*(1 - t)*Y[6] + t^3*Y[7]
P3x3(t) := (1 - t)^3*X[7] + 3*t*(1 - t)^2*X[8] + 3*t^2*(1 - t)*X[9] + t^3*X[10]
P3y3(t) := (1 - t)^3*Y[7] + 3*t*(1 - t)^2*Y[8] + 3*t^2*(1 - t)*Y[9] + t^3*Y[10]
P1x3(t) ≤ X[4]
P1y3(t) ≤ Y[4]
# Построение нескольких кривых Безье третьей степени по 4 точкам на графике исходной функции y = x^3/5 + x^2
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# Задание 7. На копии построенного в пункте 2 рисунка по полученным точкам построить другим цветом кубический B-сплайн
ORIGIN := 1
y(x) := x^3/5 + x^2
i := 1 .. 12
t1[i] := 3 + (i - 1)*0.25
t2[i] := y(t1[i])
# Для построение B - сплайна нам необходимо рассчитать, какие коэффициенты a0, a1, a2, a3, b0, b1, b2, b3 будут входить в его параметрическое уравнение:
a0(i) := (X[i - 1] + 4*X[i] + X[i + 1])/6
b0(i) := (Y[i - 1] + 4*Y[i] + Y[i + 1])/6
a1(i) := (X[i + 1] - X[i - 1])/2
b1(i) := (Y[i + 1] - Y[i - 1])/2
a2(i) := (X[i - 1] - 2*X[i] + X[i + 1])/2
b2(i) := (Y[i - 1] - 2*Y[i] + Y[i + 1])/2
a3(i) := (-X[i - 1] + 3*(X[i] - X[i + 1]) + X[i + 2])/6
b3(i) := (-Y[i - 1] + 3*(Y[i] - Y[i + 1]) + Y[i + 2])/6
SplineX(t) :=
    S ← 0
    for i ∈ 1 .. 11
        S ← ((a3(i)*t + a2(i))*t + a1(i))*t + a0(i) if X[i] ≤ t ≤ X[i + 1]
    S
BSpline(t) :=
    B ← 0
    for i ∈ 1 .. 11
        B ← ((b3(i)*t + b2(i))*t + b1(i))*t + b0(i) if Y[i] ≤ t ≤ Y[i + 1]
    B
# Построение кубического B-сплайна по исходному набору из 12 точек Xi, Yi на графике исходной функции y = x^3/5 + x^2
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