# Задание 1. Построение параметрической кривой с использованием матричного представления и функции CreateSpace
x(t) := t/(1 + t^3)
y(t) := 6*t
z(t) := t^2/(1 + t^2)
Ft(v) := [x(v); y(v); z(v)]
CF := CreateSpace(Ft, -100, 100, 2000)
# [component: inputs CF]
# Задание 2. По заданным в таблице 2 коэффициентам уравнения поверхности второго порядка A,B,C,D,E,Q.G.H.J,K,D определить вид поверхности. Если заданная поверхность получилась вырожденная или мнимая, изменить коэффициенты уравнений таким образом, чтобы они соответствовали одной из канонических поверхностей.
A := 0
B := 17
C := -15
E := 15
Q := 15
G := -14
H := 0
J := 9
K := 19
D := 3
# Определим вид поверхности:
I[1] := A + B + C
I[2] := det([A, E; E, B]) + det([B, G; G, C]) + det([A, Q; Q, C])
I[3] := det([A, E, Q; E, B, G; Q, G, C])
I[4] := det([A, E, Q, H; E, B, G, J; Q, G, C, K; H, J, K, D])
I'[2] := det([A, H; H, D]) + det([B, J; J, D]) + det([C, K; K, D])
I'[3] := det([B, G, J; G, C, K; J, K, D]) + det([A, Q, H; Q, C, K; H, K, D]) + det([A, E, H; E, B, J; H, J, D])
I[1] = 2
I[2] = -901
I[3] = -6750
I[4] = 2250
I'[2] = -436
I'[3] = -12413
# В нашем случае I3 <> 0
I[1]*I[3] = -13500  # то есть I1*I3 < 0
# Тогда получается, что поверхность вырожденная и мнимая, так как не подходит ни под один случай
# Изменим коэффициенты так, чтобы изменился знак произведения I1*I3
# Пусть С = -18
C := -18
P1 := (A + B + C)*det([A, E, Q; E, B, G; Q, G, C]) = 6075
# Получаем положительное произведение для I1*I3, далее переходим к анализу I2 и I4:
I[2] := det([A, E; E, B]) + det([B, G; G, C]) + det([A, Q; Q, C]) = -952
I[4] := det([A, E, Q, H; E, B, G, J; Q, G, C, K; H, J, K, D]) = 4275
# Так как I1*I3 > 0, I2 <=0, I4 >0, то мы получаем однополостный гиперболоид
# Задание 3. Построить квадратичную поверхность по каноническим уравнениям с численными значениями масштабных коэффициентов:
# Поверхность - однополостный гиперболоид
a := 3
b := 4
c := 5
nt := 20
nτ := 16
i := 0 .. nt
j := 0 .. nτ
t[i] := 2*π*i/nt
τ[j] := j*2/nτ - 1
p1(t, τ) := [a*cos(t)*cosh(τ); b*sinh(τ); c*sin(t)*cosh(τ)]
[x1[i, j], y1[i, j], z1[i, j]] := transpose(p1(t[i], τ[j]))
# [component: inputs (z1, x1, y1)]
# Задание 4. Построить заданную поверхность по каноническим уравнениям с численными значениями масштабных коэффициентов в соответствии с вариантом 23:
# Вариант 23 - цилиндрическая поверхность
H := 25
R := 12
φ := 220*π/180  # радиан - угол развертки цилиндра
x1 := 16
y1 := 8
z1 := 3
xA := 9
yA := 9
zA := 8
xB := 7
yB := 1
zB := 18
xC := 14
yC := 8
zC := 1
# Напишем уравнение плоскости, проходящей через точки A(xa, ya, za), B(xb,yb,zb), C(xc,yc,zc):
# Для этого составляем определитель для плоскости ABC и приравниваем его к нулю:
det(x, y, z) := det([x - xA, y - yA, z - zA; xB - zA, yB - yA, zB - zA; xC - xA, yC - yA, zC - zA])
det(x, y, z) := det([x - 9, y - 9, z - 8; 7 - 9, 1 - 9, 18 - 8; 14 - 9, 8 - 9, 1 - 8]) → 66*x + 36*y + 42*z - 1254
66*x + 36*y + 42*z - 1254 == 0  # solve
A := 66
B := 36
C := 42
D := -1254
n := [A; B; C] = [66; 36; 42]  # нормаль к плоскости основания цилиндра
Lengthn := sqrt(A^2 + B^2 + C^2) = 86.1162
A5 := [xA; yA; zA]
B5 := [xB; yB; zB]
C5 := [xC; yC; zC]
En := n/Lengthn = [0.766406; 0.41804; 0.487713]  # координаты единичного вектора нормали
z(x, y) := -A/C*x - B/C*y - D/C
Pline(x, y) := [x; y; z(x, y)]
G := CreateMesh(Pline, -20, 20, -20, 20)
lp(t, v) := A5 + n*t
Gl := CreateMesh(lp, -0.2, 0.2, 0, 0)
# [component: inputs G, Gl]
# График наглядного расположения прямой вектора нормали относительно плоскости, проходящей через точки A5, B5, C5
# Находим углы наклона нормали к осям кооординат, чтобы правильн овыполнить поворот исходного цилиндра относительно полоскости A5B5C5:
xN := [1; 0; 0]
LengthxN := 1
zN := [0; 0; 1]
LengthzN := 1
aXN := acos(xN*n/(LengthxN*Lengthn)) = 0.697569
aZN := acos(zN*n/(LengthzN*Lengthn)) = 1.06133
Ua := sin(aZN) = 0.873004
Ub := cos(aXN) = 0.766406
Uz := asin(Ub/Ua) = 1.07145
Ux := aZN = 1.06133
# Получим матрицы для поворота:
Ax(v) := [1, 0, 0; 0, cos(v), -sin(v); 0, sin(v), cos(v)]
Ay(v) := [cos(v), 0, sin(v); 0, 1, 0; -sin(v), 0, cos(v)]
Az(v) := [cos(v), -sin(v), 0; sin(v), cos(v), 0; 0, 0, 1]
nt := 40
i := 0 .. nt
ng := 10
j := 0 .. ng
va := Ux
vb := Ux
vc := Uz
t[i] := π*i/nt
g[j] := π*4*j/ng
# Вектор для построения исходного цилиндра, смещенного относительного точки центра основания с координатами (x1,y1,z1)::
Cyl(f, h) := [R*cos(f) + x1; R*sin(f) + y1; h + z1]
# Далее домножаем его на полученные матрицы поворота и получаем вектор для построения цилиндра, основание которого параллельно плоскости A5B5C5:
CylNew(f, h) := Ax(va)*Ay(vb)*Az(vc)*Cyl(f, h)
[x[i, j], y[i, j], z[i, j]] := transpose(CylNew(t[i], g[j]))
h := 0 .. H
f := 0 .. 2*π
CNew := CreateMesh(CylNew, 0, φ, H, 0, 20)
C := CreateMesh(Cyl, 0, φ, H, 0, 20)
# [component: inputs G, Gl, C, CNew]
