# Задание 2. Построить точки P1 - P5, получить замкнутый пятиугольник, затем заменить сторону P1P5 полуокружностью с диаметром равным P1P5
ORIGIN := 1
x1 := 15
y1 := 4
x2 := 5
y2 := 8
x3 := 4
y3 := 0
x4 := 19
y4 := 8
x5 := 9
y5 := 16
P1 := [x1; y1] = [15; 4]
P2 := [x2; y2] = [5; 8]
P3 := [x3; y3] = [4; 0]
P4 := [x4; y4] = [19; 8]
P5 := [x5; y5] = [9; 16]
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# Получаем правильный порядок точек для построения замкнутого пятиугольника:
Y := [P4[2]; P1[2]; P3[2]; P2[2]; P5[2]]
X := [P4[1]; P1[1]; P3[1]; P2[1]; P5[1]]
# Находим длину стороны P4P5, которая будет диаметром искомой полуокружности:
LenghtP1P4 := sqrt((P5[1] - P4[1])^2 + (P5[2] - P4[2])^2) = 12.8062
# Найдем точку P0 - середину P1P4 - центр полуокружности:
r := LenghtP1P4/2 = 6.40312
# Уравнения полуокружностей:
P0 := [(P4[1] + P5[1])/2; (P4[2] + P5[2])/2] = [14; 12]
pcircle1(x) := sqrt(r^2 - (x - P0[1])^2) + P0[2]
pcircle2(x) := -1*sqrt(r^2 - (x - P0[1])^2) + P0[2]
x1 := P5[1], P5[1] + 0.8 .. 22
x2 := P4[1], P4[1] + 0.1 .. 22
P4[1] = 19
P5[1] = 9
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pcircle1(x1) = [16; 16.8332; 17.4259; 17.8515; 18.1449; 18.3246; 18.4; 18.375; 18.2482; 18.0133; 17.6569; 17.1536; 16.4542; 15.4409; 13.6; 12 + 2.82843i; 12 + 4.45421i]
Sprite := [
    P4[1], P4[2], 1;
    P1[1], P1[2], 1;
    P3[1], P3[2], 1;
    P2[1], P2[2], 1;
    5, 9, 1;
    9.8, 16.833, 1;
    10.6, 17.426, 1;
    11.4, 17.851, 1;
    12.2, 18.145, 1;
    13, 18.325, 1;
    13.8, 18.4, 1;
    14.6, 18.375, 1;
    15.4, 18.248, 1;
    16.2, 18.013, 1;
    17, 17.657, 1;
    17.8, 17.154, 1;
    18.6, 16.454, 1;
    19.4, 15.441, 1;
    20.2, 13.6, 1;
    20.4, 11.8, 1;
    20.3, 10.855, 1;
    20.2, 10.4, 1;
    20.1, 10.053, 1;
    20, 9.764, 1;
    19.9, 9.512, 1;
    19.8, 9.287, 1;
    19.7, 9.083, 1;
    19.6, 8.895, 1;
    19.5, 8.721, 1;
    19.4, 8.559, 1;
    19.3, 8.407, 1;
    19.2, 8.264, 1;
    19.1, 8.128, 1;
    x4, y4, 1
]
Tx := [9; 9.8; 10.6; 11.4; 12.2; 13; 13.8; 14.6; 15.4; 16.2; 17; 17.8; 18.6; 19.4; 20.2; 20.4; 20.3; 20.2; 20.1; 20.0; 19.9; 19.8; 19.7; 19.6; 19.5; 19.4; 19.3; 19.2; 19.1; 19]
Ty := [16; 16.833; 17.426; 17.851; 18.145; 18.325; 18.4; 18.375; 18.248; 18.013; 17.657; 17.154; 16.454; 15.441; 13.6; 11.8; 10.855; 10.4; 10.053; 9.764; 9.512; 9.287; 9.083; 8.895; 8.721; 8.559; 8.407; 8.264; 8.128; 8]
pcircle2(x2) = [
    8; 8.12831; 8.26369; 8.40695; 8.55907; 8.72128; 8.89517; 9.08281; 9.28707; 9.51203
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]
# Попробуем построить фигуру по полученным точкам матрицы Sprite:
t := 1, 2 .. 34
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# Задание 3. Отражение объекта относительно прямой, заданной двумя точками O1(x1,y1) и O2(x2,y2), а затем относительно оси OX
O1 := [0; 1]
O2 := [6; 7]
x3 := [0; 6]
y3 := [1; 7]
newX := 6 + 0 = 6
newY := 1 - 7 = -6
l := atan(newX/newY) = -0.785398
# Получим матрицы для отражения фигуры относительно прямой:
Mot1 := [cos(l), sin(l), 0; -sin(l), cos(l), 0; 0, 0, 1]
Mot2 := [cos(-l), sin(-l), 0; -sin(-l), cos(-l), 0; 0, 0, 1]
T1 := [1, 0, 0; 0, 1, 0; 0, 1, 1]
T2 := [1, 0, 0; 0, 1, 0; 0, -1, 1]
M := [-1, 0, 0; 0, 1, 0; 0, 0, 1]
Sprite1 := Sprite*T1*Mot2*M*T2*Mot1
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# Далее отразим исходную красную фигуру относительно прямой OX:
M1 := [1, 0, 0; 0, -1, 0; 0, 0, 1]
Sprite2 := Sprite*M1
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# б - поворот объекта на заданный угол относительно точки P1(x1,y1):
φ := 145/180*π
P1 := [-3; 0]
M1 := [1, 0, 0; 0, 1, 0; -3, 0, 1]
Mot1 := [cos(φ), sin(φ), 0; -sin(φ), cos(φ), 0; 0, 0, 1]
Sprite3 := Sprite*M1*Mot1*M1
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# в - масштабирование объекта с заданными коэффициентами по осям:
Sx := 1.2
Sy := 0.8
M1 := [Sx, 0, 0; 0, Sy, 0; 0, 0, 1]
Sprite4 := Sprite*M1
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# г - перенос объекта на заданные расстояния по осям
Tx := -25
Ty := 5
M1 := [1, 0, 0; 0, 1, 0; Tx, Ty, 1]
Sprite5 := Sprite*M1
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# Задание 4. Выполнить заданное геометрическое преобразование объекта с предварительным вычислением общей матрицы преобразований:
# Константы поворота:
xc := 23
yc := 16
φ := π/2
# Константы переноса:
Tx := 25
Ty := 25
# Константы масштабирования:
Sx := 0.5
Sy := 1.5
# Построим матрицы для отдельных геометрических преобразований по порядку и получим в итоге общую матрицу преобразований:
# для поворота
Mot1 := [1, 0, 0; 0, 1, 0; xc, yc, 1]
Mot2 := [1, 0, 0; 0, 1, 0; -xc, -yc, 1]
Mot3 := [cos(φ), sin(φ), 0; -sin(φ), cos(φ), 0; 0, 0, 1]
# для переноса
M1 := [1, 0, 0; 0, 1, 0; Tx, Ty, 1]
# для масштабирования
M2 := [Sx, 0, 0; 0, Sy, 0; 0, 0, 1]
# Общая матрица преобразований M:
M := Mot1*Mot3*Mot2*M1*M2 = [0, 1.5, 0; -0.5, 0, 0; -7, 48, 1]
# Искомая фигура задается так:
SpriteNew := Sprite*M
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# Задание 5. Выполнить анимацию геометрического преобразования фигуры
Mot1 = [1, 0, 0; 0, 1, 0; 23, 16, 1]
Mot2 = [1, 0, 0; 0, 1, 0; -23, -16, 1]
φ(FRAME) := 145/180*π*FRAME/10
Mot3(FRAME) := [cos(φ(FRAME)), sin(φ(FRAME)), 0; -sin(φ(FRAME)), cos(φ(FRAME)), 0; 0, 0, 1]
M1 = [1, 0, 0; 0, 1, 0; 25, 25, 1]
M2 = [0.5, 0, 0; 0, 1.5, 0; 0, 0, 1]
SpriteNew(FRAME) := Mot1*Mot3(FRAME)*Mot2*M1*M2
Animation(FRAME) := Sprite*SpriteNew(FRAME)
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