# Задание 2. Построить заданный объемный каркасный объект (выпуклый многогранник)
ORIGIN := 1
# Координаты узлов трехмерного графического объекта:
P1 := [14; 0; 4; 1]
P2 := [0; 4; 4; 1]
P3 := [4; 4; 8; 1]
P4 := [4; 8; 8; 1]
P5 := [8; 8; 10; 1]
# Ребра трехмерного графического объекта:
# r1 - P2-P5 | r2 - P5P1  r3 - P2P1  r4 - P3P1  r5 - P4P3  r6 - P2P4
# r7 - P4P1  r8 - P4P5  r9 - P3P1  r10 - P1P4  r11 - P5P1
X := [
    P2[1], P5[1], P1[1], P2[1], P1[1], P3[1], P1[1], P4[1], P3[1], P2[1];
    P4[1], P1[1], P4[1], P5[1], P3[1], P1[1], P4[1], P5[1], P1[1], P2[1]
]
Y := [
    P2[2], P5[2], P1[2], P2[2], P1[2], P3[2], P1[2], P4[2], P3[2], P2[2];
    P4[2], P1[2], P4[2], P5[2], P3[2], P1[2], P4[2], P5[2], P1[2], P2[2]
]
Z := [
    P2[3], P5[3], P1[3], P2[3], P1[3], P3[3], P1[3], P4[3], P3[3], P2[3];
    P4[3], P1[3], P4[3], P5[3], P3[3], P1[3], P4[3], P5[3], P1[3], P2[3]
]
Object := [X; Y; Z]
# [component: inputs Object]
# Задание 3. Выполним преобразования геометрического объекта
# Сначала выполним перенос относительно оси X
Tx := 5
M := [1, 0, 0, 0; 0, 1, 0, 0; 0, 0, 1, 0; Tx, 0, 0, 1]
# Изменим координаты точек для выпуклого многранника:
P1 := transpose(transpose(P1)*M) = [19; 0; 4; 1]
P2 := transpose(transpose(P2)*M) = [5; 4; 4; 1]
P3 := transpose(transpose(P3)*M) = [9; 4; 8; 1]
P4 := transpose(transpose(P4)*M) = [9; 8; 8; 1]
P5 := transpose(transpose(P5)*M) = [13; 8; 10; 1]
X := [
    P2[1], P5[1], P1[1], P2[1], P1[1], P3[1], P1[1], P4[1], P3[1], P2[1];
    P4[1], P1[1], P4[1], P5[1], P3[1], P1[1], P4[1], P5[1], P1[1], P2[1]
]
Y := [
    P2[2], P5[2], P1[2], P2[2], P1[2], P3[2], P1[2], P4[2], P3[2], P2[2];
    P4[2], P1[2], P4[2], P5[2], P3[2], P1[2], P4[2], P5[2], P1[2], P2[2]
]
Z := [
    P2[3], P5[3], P1[3], P2[3], P1[3], P3[3], P1[3], P4[3], P3[3], P2[3];
    P4[3], P1[3], P4[3], P5[3], P3[3], P1[3], P4[3], P5[3], P1[3], P2[3]
]
Object1 := [X; Y; Z]
# [component: inputs Object, Object1]
# Далее выполним поворот относительно оси Y
φ := 3/4*π
M1 := [cos(φ), 0, -sin(φ), 0; 0, 1, 0, 0; sin(φ), 0, cos(φ), 0; 0, 0, 0, 1]
P1 := transpose(transpose(P1)*M1) = [-10.6066; 0; -16.2635; 1]
P2 := transpose(transpose(P2)*M1) = [-0.707107; 4; -6.36396; 1]
P3 := transpose(transpose(P3)*M1) = [-0.707107; 4; -12.0208; 1]
P4 := transpose(transpose(P4)*M1) = [-0.707107; 8; -12.0208; 1]
P5 := transpose(transpose(P5)*M1) = [-2.12132; 8; -16.2635; 1]
X := [
    P2[1], P5[1], P1[1], P2[1], P1[1], P3[1], P1[1], P4[1], P3[1], P2[1];
    P4[1], P1[1], P4[1], P5[1], P3[1], P1[1], P4[1], P5[1], P1[1], P2[1]
]
Y := [
    P2[2], P5[2], P1[2], P2[2], P1[2], P3[2], P1[2], P4[2], P3[2], P2[2];
    P4[2], P1[2], P4[2], P5[2], P3[2], P1[2], P4[2], P5[2], P1[2], P2[2]
]
Z := [
    P2[3], P5[3], P1[3], P2[3], P1[3], P3[3], P1[3], P4[3], P3[3], P2[3];
    P4[3], P1[3], P4[3], P5[3], P3[3], P1[3], P4[3], P5[3], P1[3], P2[3]
]
Object2 := [X; Y; Z]
# [component: inputs Object1, Object2]
# Далее выполним масштабирование относительно оси z
Sz := 2.5
M2 := [1, 0, 0, 0; 0, 1, 0, 0; 0, 0, Sz, 0; 0, 0, 0, 1]
P1 := transpose(transpose(P1)*M2) = [-10.6066; 0; -40.6586; 1]
P2 := transpose(transpose(P2)*M2) = [-0.707107; 4; -15.9099; 1]
P3 := transpose(transpose(P3)*M2) = [-0.707107; 4; -30.052; 1]
P4 := transpose(transpose(P4)*M2) = [-0.707107; 8; -30.052; 1]
P5 := transpose(transpose(P5)*M2) = [-2.12132; 8; -40.6586; 1]
X := [
    P2[1], P5[1], P1[1], P2[1], P1[1], P3[1], P1[1], P4[1], P3[1], P2[1];
    P4[1], P1[1], P4[1], P5[1], P3[1], P1[1], P4[1], P5[1], P1[1], P2[1]
]
Y := [
    P2[2], P5[2], P1[2], P2[2], P1[2], P3[2], P1[2], P4[2], P3[2], P2[2];
    P4[2], P1[2], P4[2], P5[2], P3[2], P1[2], P4[2], P5[2], P1[2], P2[2]
]
Z := [
    P2[3], P5[3], P1[3], P2[3], P1[3], P3[3], P1[3], P4[3], P3[3], P2[3];
    P4[3], P1[3], P4[3], P5[3], P3[3], P1[3], P4[3], P5[3], P1[3], P2[3]
]
Object3 := [X; Y; Z]
# [component: inputs Object2, Object3]
# Далее выполним отражение объекта относительно плоскости xoz
M3 := [1, 0, 0, 0; 0, -1, 0, 0; 0, 0, 1, 0; 0, 0, 0, 1]
P1 := transpose(transpose(P1)*M3) = [-10.6066; 0; -40.6586; 1]
P2 := transpose(transpose(P2)*M3) = [-0.707107; -4; -15.9099; 1]
P3 := transpose(transpose(P3)*M3) = [-0.707107; -4; -30.052; 1]
P4 := transpose(transpose(P4)*M3) = [-0.707107; -8; -30.052; 1]
P5 := transpose(transpose(P5)*M3) = [-2.12132; -8; -40.6586; 1]
X := [
    P2[1], P5[1], P1[1], P2[1], P1[1], P3[1], P1[1], P4[1], P3[1], P2[1];
    P4[1], P1[1], P4[1], P5[1], P3[1], P1[1], P4[1], P5[1], P1[1], P2[1]
]
Y := [
    P2[2], P5[2], P1[2], P2[2], P1[2], P3[2], P1[2], P4[2], P3[2], P2[2];
    P4[2], P1[2], P4[2], P5[2], P3[2], P1[2], P4[2], P5[2], P1[2], P2[2]
]
Z := [
    P2[3], P5[3], P1[3], P2[3], P1[3], P3[3], P1[3], P4[3], P3[3], P2[3];
    P4[3], P1[3], P4[3], P5[3], P3[3], P1[3], P4[3], P5[3], P1[3], P2[3]
]
Object4 := [X; Y; Z]
# [component: inputs Object3, Object4]
# Задание 4. Выполнить геометрические преобразования в следующем порядке:
# отражение, масштабирование, перенос, поворот
M3 = [1, 0, 0, 0; 0, -1, 0, 0; 0, 0, 1, 0; 0, 0, 0, 1]
M2 = [1, 0, 0, 0; 0, 1, 0, 0; 0, 0, 2.5, 0; 0, 0, 0, 1]
M = [1, 0, 0, 0; 0, 1, 0, 0; 0, 0, 1, 0; 5, 0, 0, 1]
M1 = [-0.707107, 0, -0.707107, 0; 0, 1, 0, 0; 0.707107, 0, -0.707107, 0; 0, 0, 0, 1]
# Получим общую матрицу для данной цепочки преобразований:
Mo := M3*M2*M*M1 = [-0.707107, 0, -0.707107, 0; 0, -1, 0, 0; 1.76777, 0, -1.76777, 0; -3.53553, 0, -3.53553, 1]
# Еще раз зададим положения точек объекта до преобразований:
P1 := [14; 0; 4; 1]
P2 := [0; 4; 4; 1]
P3 := [4; 4; 8; 1]
P4 := [4; 8; 8; 1]
P5 := [8; 8; 10; 1]
X := [
    P2[1], P5[1], P1[1], P2[1], P1[1], P3[1], P1[1], P4[1], P3[1], P2[1];
    P4[1], P1[1], P4[1], P5[1], P3[1], P1[1], P4[1], P5[1], P1[1], P2[1]
]
Y := [
    P2[2], P5[2], P1[2], P2[2], P1[2], P3[2], P1[2], P4[2], P3[2], P2[2];
    P4[2], P1[2], P4[2], P5[2], P3[2], P1[2], P4[2], P5[2], P1[2], P2[2]
]
Z := [
    P2[3], P5[3], P1[3], P2[3], P1[3], P3[3], P1[3], P4[3], P3[3], P2[3];
    P4[3], P1[3], P4[3], P5[3], P3[3], P1[3], P4[3], P5[3], P1[3], P2[3]
]
ObjectBefore := [X; Y; Z]
# Далее зададим положения точек объекта после выполнения преобразований:
P1 := transpose(transpose(P1)*Mo) = [-6.36396; 0; -20.5061; 1]
P2 := transpose(transpose(P2)*Mo) = [3.53553; -4; -10.6066; 1]
P3 := transpose(transpose(P3)*Mo) = [7.77817; -4; -20.5061; 1]
P4 := transpose(transpose(P4)*Mo) = [7.77817; -8; -20.5061; 1]
P5 := transpose(transpose(P5)*Mo) = [8.48528; -8; -26.8701; 1]
X1 := [
    P2[1], P5[1], P1[1], P2[1], P1[1], P3[1], P1[1], P4[1], P3[1], P2[1];
    P4[1], P1[1], P4[1], P5[1], P3[1], P1[1], P4[1], P5[1], P1[1], P2[1]
]
Y1 := [
    P2[2], P5[2], P1[2], P2[2], P1[2], P3[2], P1[2], P4[2], P3[2], P2[2];
    P4[2], P1[2], P4[2], P5[2], P3[2], P1[2], P4[2], P5[2], P1[2], P2[2]
]
Z1 := [
    P2[3], P5[3], P1[3], P2[3], P1[3], P3[3], P1[3], P4[3], P3[3], P2[3];
    P4[3], P1[3], P4[3], P5[3], P3[3], P1[3], P4[3], P5[3], P1[3], P2[3]
]
ObjectAfter := [X1; Y1; Z1]
# ObjectBefore - синий цвет
# ObjectAfter - красный цвет
# [component: inputs ObjectBefore, ObjectAfter]
