# Задание 1
x1 := 8
y1 := 4  # точка p1
x2 := 19
y2 := 8  # точка p2
x3 := 2
y3 := 3  # точка p3
x4 := 9
y4 := 17  # точка p4
x5 := 2
y5 := 8  # точка p5
P1(x, y) := [x1; y1; 0]
P2(x, y) := [x2; y2; 0]
P3(x, y) := [x3; y3; 0]
P(x, y) := [x; y; 0]
P4(x, y) := [x4; y4; 0]
P5(x, y) := [x5; y5; 0]
T(x, y) := CreateMesh([x; y; 0], x, x, y, y)  # error: This value must be a function.
T1 := CreateMesh(P1, x1, x1, y1, y1)
T4 := CreateMesh(P4, x4, x4, y4, y4)
T2 := CreateMesh(P2, x2, x2, y2, y2)
T5 := CreateMesh(P5, x5, x5, y5, y5)
T3 := CreateMesh(P3, x3, x3, y3, y3)
Ln45(u, v) := [x4 + (x5 - x4)*u; y4 + (y5 - y4)*u; 0]
Ln12(u, v) := [x1 + (x2 - x1)*u; y1 + (y2 - y1)*u; 0]
L12 := CreateMesh(Ln12, 0, 1, 0, 0)
L45 := CreateMesh(Ln45, 0, 1, 0, 0)
Ln53(u, v) := [x5 + (x3 - x5)*u; y5 + (y3 - y5)*u; 0]
Ln24(u, v) := [x2 + (x4 - x2)*u; y2 + (y4 - y2)*u; 0]
L24 := CreateMesh(Ln24, 0, 1, 0, 0)
L53 := CreateMesh(Ln53, 0, 1, 0, 0)
Ln31(u, v) := [x3 + (x1 - x3)*u; y3 + (y1 - y3)*u; 0]
L31 := CreateMesh(Ln31, 0, 1, 0, 0)
# [component: inputs T1, T2, T3, T4, T5, L12, L24, L45, L53, L31]
# Построенный пятиугольник на векторном 3-мерном графике
# Задание 7
p3 := [x3; y3; 0]
p4 := [x4; y4; 0]
p1 := [x1; y1; 0]
n1 := (p4 - p3)/|p4 - p3|
ln1(t) := p3 + t*n1
(ln1(t) - p1)*n1 == 0*solve, t → 2*sqrt(5)*(2*sqrt(5)*t/5 - 1)/5 + sqrt(5)*(sqrt(5)*t/5 - 6)/5 == 0, t
h := ln1(8*sqrt(5))
H(x, y) := [10; 19; 0]
h = [10; 19; 0]
H := CreateMesh(H, 1, 1, 0, 0)
G(u, v) := p1 + u*(p1 - h)
perpend := CreateMesh(G, -10, 10, 10, 50)
lnn1(u, v) := p3 + u*n1
lin1 := CreateMesh(lnn1, -10, 10, 10, 50)
# [component: inputs T1, T2, T3, T4, T5, L12, L24, L45, L53, L31, lin1, perpend]
